# TWISS
# [component: outputs BETAX]
# [component: outputs BETAY]
# [component: outputs DISPX]
rows(BETAX) = 481
cols(DISPX) = 2
rows(BETAY) = 481
cols(BETAY) = 2
rows(DISPX) = 481
i := 0 .. rows(BETAX) - 1
el[i] := BETAX[i, 1]
β_x[i] := BETAX[i, 0]
β_y[i] := BETAY[i, 0]
D_x[i] := DISPX[i, 0]
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